// COMSOL Multiphysics 5.3.1.348 model "comsol(sin terminar).mph"
// Outline of the model tree

Parameters
  epsi_r = 5.6[1]  // permeabilidad relativa
  Ri = 0.25[m]  // radio interior
  Re = 0.55[m]  // radio exterior
  epsi_0 = 8.85E-12[F/m]  // constante dieletrica

Geometry
  geom1 "Geometry 1" (2D, length unit m)
    c1: Circle | r = Re
    c2: Circle | r = Ri
    dif1: Difference | input = c1; input2 = c2
    fin: Finalize "Form Union"

Physics
  es: Electrostatics on all domains
    dependent variable V
    ccn1: ChargeConservation (default)
    zc1: ZeroCharge (default)
    init1: init "Initial Values 1" (default)
    pot1: ElectricPotential on boundaries 7

Mesh
  mesh1 "Mesh 1" (physics-controlled)

Studies
  std1 "Study 1"
    stat: Stationary